#########################################################################################
# title: in.repose_loop                                                              #
# version: 4.01                                                                         #
# additional files: folder mesh,                                                        #
#                   folder matlab,                                                      #
#                   postprocessing-script plotForce_v3_16.m                             #
# date: Aug. 2014                                                                       #
# authors: Benvenuti, L., Queteschiner, D., Aigner, A.                                                                 #
# e-mail: luca.benvenuti@jku.at                                                         #
# short description: liggghts-input file for computing the shear force of a simple      #
# shear tester while varying the coefficient of friction.                               #
#  Part of the material characterization project                                        #
#########################################################################################

#########################################################################################
#                               user defined settings: settings                         #
#########################################################################################
label loopiteration

variable fileID     index       201	202	203	204	205	206	207	208	209	211	212	213	214	215	216	217	218	219	221	222	223	224	225	226	227	228	229	231	232	233	234	235	236	237	238	239	241	242	243	244	245	246	247	248	249	251	252	253	254	255	256	257	258	259

variable    rad     equal       732e-6          # particle radius [m]
variable    radmu   equal       732e-6             # particle radius mean [m]
variable  radsigma  equal       0.00041             # particle radius sigma[m]
variable  radR1     equal       0.001
variable  radPerc1  equal       0.4609
variable  radR2     equal       0.0008
variable  radPerc2  equal       0.1596
variable  radR3     equal       0.000625
variable  radPerc3  equal       0.1050
variable  radR4     equal       0.000315
variable  radPerc4  equal       0.2299
variable  radR5     equal       0.0001575
#variable  radPerc5  equal       0.0289
variable  radR6     equal       0.00006205
#variable  radPerc6  equal       0.0157
variable  radPerc5  equal       0.0446
variable  radPerc6  equal       0.0
variable    dens    equal       3000         #sinterfine   # particle density [kg/m3]
variable    ym      equal       1e7             # Young's modulus  [Pa]
variable    pr      equal       0.4            # Poisson ratio   [-]
variable    rest    equal       0.5         # coefficient of restitution [-]
variable    fric    equal       0.4       # coefficient of friction (loop variable) [-]
variable    rf      equal       0.4        # coefficient of rolling friction (optional loop) [-]
variable    a       equal       ${rf}
#variable    rvd    equal        1.0		#coefficientRollingViscousDamping (only for epsd rolling model)
variable    rolfrtypnum equal	4		# rolling friction option ( 1 = off, 2 = cdt, 3 = epsd, 4 = epsd2)
variable    uniSys  equal       1		 # unit System ( 1=SI, 2=cgs)
variable    radDist equal       3         # radius distribution (1 = (25%rad*0.99 , 25%rad*1.01, 50%rad ;
                                           # 2=gaussian distribution with radmu & radsigma)
                                           # for 2 you must uncomment radsigma & radmu, the latter must be equal to rad
                                            # 3=discrete distribution with real values

variable    dt      equal       1e-6            # time step width [s]

variable    dCylDp  equal       50      # ratio cylinder diameter to particle diameter (optional loop)
variable    G_D_RATIO  equal       ${dCylDp}

variable    accGrev equal       9.81            # acceleration due to gravity [m/s2]

processors  1 1 1

variable    ratio   equal       0.0001
#########################################################################################
units		si
#########################################################################################

# geometry scaling, mass, number of timesteps, ...
variable    rad1            equal   0.99*${rad}
variable    rad2            equal   1.01*${rad}

variable    skin            equal   0.50*${radR1}
#variable    velMax          equal   0.49*${skin}/${dt}

# radii for fractions
variable    r0              equal        ${rad}

# run & dump times
variable    nDump           equal   round(1e-2/${dt})
variable    nScreen         equal   round(1e-3/${dt})
variable    nDumpForce      equal   round(1e-3/${dt})

variable    characteristicVelocity equal 0.1

#variable    nStepsSettle    equal   round(${pz}/(0.5*${velMax}*${dt}))
#variable    nStepsRun       equal   round(0.5*0.375*${cylRadius}/(${velWall}*${dt}))
#variable    nStepsRun2      equal   round(${nStepsRun}/20)
#variable    nStepsRun3      equal   ${nStepsRun2}*19
#variable    nStepsRun4      equal   ${nStepsRun}*2
variable    totaltime	 equal   20.0
variable	nStepsSettle equal round(0.001/${dt})
variable	nStepsRun    equal round(0.01/${dt})
variable	dumpfreq     equal round(0.01/${dt})
variable	thermofreq   equal round(0.001/${dt})
#variable	nstep        equal round(20./${dt}) #2000000
variable	nstep        equal round(${totaltime}/${dt}) #2000000
variable	deletefreq   equal round(0.1/${dt}) #10000

#########################################################################################
#rolling friction options

if "${rolfrtypnum} == 1" then &
  "variable    rolfrtyp string	off" &
elif "${rolfrtypnum} == 2" &
  "variable    rolfrtyp string	cdt" &
elif "${rolfrtypnum} == 3" &
  "variable    rolfrtyp string	epsd" &
else &
  "variable    rolfrtyp string	epsd2"
#########################################################################################


# create directories
shell   mkdir logs
shell   mkdir restart
shell   mkdir post
shell   mkdir results
shell	mkdir area
shell	mkdir images
shell	mkdir post_param


# writing log file to post folder
log     logs/log.reposeAngle_${fileID}.txt

atom_style	granular
atom_modify	map array
boundary    m m fm
newton      off

communicate	single vel yes

read_restart	restart/repose_loop_${fileID}.restart


#Material properties required for new pair styles
fix     m1 all property/global youngsModulus peratomtype ${ym} ${ym}
fix     m2 all property/global poissonsRatio peratomtype ${pr} ${pr}
fix     m3 all property/global coefficientRestitution peratomtypepair 2 ${rest} ${rest} ${rest} ${rest}
fix     m4 all property/global coefficientFriction peratomtypepair 2 ${fric} 0.0 0.0 0.0
fix     m5 all property/global coefficientRollingFriction peratomtypepair 2 ${rf} 0.0 0.0 0.0
fix     m6 all property/global characteristicVelocity scalar ${characteristicVelocity}
#fix    m7 all property/global coefficientRollingViscousDamping peratomtypepair 2 ${rvd} 0.0 0.0 0.0

# define the material in use  ## pts1 0.25 pts2 0.25  volume_limit ${volMin}"
if "${radDist} == 2" then                            &
  "fix    pts3 all particletemplate/sphere 5328 atom_type 1 density constant ${dens} radius gaussian number ${radmu} ${radsigma}"  &
  "fix	pdd  all particledistribution/discrete 5332  1 pts3 1.0 "   &
  "print 'particle radius distribution gaussian'"                         &
elif "${radDist} == 3" &
  "fix		ptsd1  all particletemplate/sphere 5333 atom_type 1 density constant ${dens} radius constant ${radR1}"                                &
  "fix		ptsd2  all particletemplate/sphere 5334 atom_type 1 density constant ${dens} radius constant ${radR1}"                                &
  "fix		ptsd3  all particletemplate/sphere 5335 atom_type 1 density constant ${dens} radius constant ${radR3}"                                &
  "fix		ptsd4  all particletemplate/sphere 5336 atom_type 1 density constant ${dens} radius constant ${radR4}"                                &
  "fix		ptsd5  all particletemplate/sphere 5337 atom_type 1 density constant ${dens} radius constant ${radR5}"                                &
  "fix		ptsd6  all particletemplate/sphere 5338 atom_type 1 density constant ${dens} radius constant ${radR6}" &
  "fix		pdd  all particledistribution/discrete 5339  6 ptsd1 ${radPerc1} ptsd2 ${radPerc2} ptsd3 ${radPerc3} ptsd4 ${radPerc4} ptsd5 ${radPerc5} ptsd6 ${radPerc6}"  &
  "print 'particle radius distribution discrete REAL'"    &
else &
  "fix		pts  all particletemplate/sphere 5330 atom_type 1 density constant ${dens} radius constant ${rad}"                                &
  "fix		pts1 all particletemplate/sphere 5329 atom_type 1 density constant ${dens} radius constant ${rad1}"                                &
  "fix		pts2 all particletemplate/sphere 5331 atom_type 1 density constant ${dens} radius constant ${rad2}" &
  "fix		pdd  all particledistribution/discrete 5332  3 pts 0.5 pts1 0.25 pts2 0.25"                         &
  "print 'particle radius distribution discrete zero99 one oneoone'"

#variable	maxdiam equal ${radR1}*2
# calculate maximum diameter in simulation
fix		maxdiam all diam/max
variable	maxdiam equal f_maxdiam

variable	dx_relax equal ${maxdiam}/20.
# scaling factor for mesh
variable    scale equal ${G_D_RATIO}*${maxdiam}/1.5

variable	dcyl equal ${G_D_RATIO}*${maxdiam}

pair_style 	gran model hertz tangential history rolling_friction ${rolfrtyp}
pair_coeff	* *

# time-step and gravity

timestep	${dt}
#Gravity
fix		gravi all gravity ${accGrev} vector 0.0 0.0 -1.0

# meshes
#fix		cad1 all mesh/surface file meshes/ground.stl type 1 scale ${scale}
#fix		cad2 all mesh/surface file meshes/cylinder.stl type 1 scale ${scale}

# use the imported meshes as granular wall
#fix		granwalls all wall/gran model hooke mesh n_meshes 2 meshes cad1 cad2
#fix		topwall all wall/gran model hooke primitive type 1 zplane 1.0

#apply nve integration to all particles that are inserted as single particles
fix		integr all nve/sphere

# lower region to delete particles from
region		lower block INF INF INF INF INF 0. units box

# load balancing
fix     lb all balance 0 xyz 10 1.05

#check timestep
fix     ts all check/timestep/gran 1 0.1 0.1 #use small values to produce output

#output settings, include total thermal energy
compute		    rke all erotate/sphere
thermo_style	custom step atoms ke c_rke f_ts[1] f_ts[2] cpu vol
thermo		${thermofreq}
thermo_modify	lost ignore norm no
compute_modify	thermo_temp dynamic yes

# dump
#dump		dumpstl all stl ${dumpfreq} post_param/stldump_${rf}_*.stl
#dump		dmp all custom ${dumpfreq} post_param/dump_${rf}_*.fill id type x y z ix iy iz vx vy vz fx fy fz omegax omegay omegaz radius

#pair_style	gran model hertz rolling_friction ${rolfrtyp} #cohesion ${pairStyleCohesion} tangential_damping ${pairStyleDamping} # viscous ${pairStyleViscous}
#pair_coeff	* *


# evaluate convex hull
variable	n_cuts equal 2.*${G_D_RATIO}
variable	cut_thickness equal ${maxdiam}/2.
compute		chull all crosssection skin ${skin} dim z min ${r0} max ${dcyl}  n_cuts ${n_cuts}  cut_thickness ${cut_thickness} file results/area_fid${fileID}.txt

# measure angle
variable	i equal ${n_cuts}+1
variable	c equal c_chull[$i]
fix		pr all print 1 "$c" screen no file results/angle_fid${fileID} title ${fileID}
run		1

#variable fileID equal ${fileID}+1

# loop
clear
next     fileID
jump     SELF loopiteration
#variable fric delete

#next     rf
#jump     SELF loopiteration
#variable rf delete

#next     rest
#jump     SELF loopiteration
