#########################################################################################
# title: in.repose_loop                                                              #
# version: 5.01                                                                         #
# additional files: folder mesh,                                                        #
#                   folder matlab,                                                      #
#                   postprocessing-script plotForce_v3_16.m                             #
# date: Aug. 2014                                                                       #
# authors: Benvenuti, L., Queteschiner, D., Aigner, A. , Berger R.                      #
# e-mail: luca.benvenuti@jku.at                                                         #
# short description: liggghts-input file for computing the shear force of a simple      #
# shear tester while varying the coefficient of friction.                               #
#  Part of the material characterization project                                        #
#########################################################################################

#########################################################################################
#                               user defined settings: settings                         #
#########################################################################################
variable fileID equal ${iden}
label loopiteration

variable    rad     equal       349e-6          # particle radius [m]
variable    radmu   equal       349e-6             # particle radius mean [m]
variable  radsigma  equal       0.000266            # particle radius sigma[m]
variable  radR1     equal       0.001
variable  radPerc1  equal       0.05
variable  radR2     equal       0.0008
variable  radPerc2  equal       0.0
variable  radR3     equal       0.000625
variable  radPerc3  equal       0.0
variable  radR4     equal       0.000315
variable  radPerc4  equal       0.95
variable  radR5     equal       0.0001575
variable  radPerc5  equal       0.0
variable  radR6     equal       0.00006205
variable  radPerc6  equal       0.0
variable    dens    equal       3000         #sinterfine   # particle density [kg/m3]
variable    ym      equal       1e7             # Young's modulus  [Pa]
variable    pr      equal       0.4            # Poisson ratio   [-]
variable    rest    equal       0.5           # coefficient of restitution [-]
variable    fric    universe    0.4	 0.6	0.8	0.4	0.6	0.8	0.4	0.6	0.8       # coefficient of friction (loop variable) [-]
variable    rf      universe    0.4	 0.4	0.4	0.6	0.6	0.6	0.8	0.8	0.8        # coefficient of rolling friction (optional loop) [-]
variable    a       equal       ${rf}*${fric}
variable    rolfrtypnum equal	4		# rolling friction option ( 1 = off, 2 = cdt, 3 = epsd, 4 = epsd2)
variable    rolfrtyp string	epsd2
variable    uniSys  equal       1		 # unit System ( 1=SI, 2=cgs)
variable    radDist equal       3         # radius distribution (1 = (25%rad*0.99 , 25%rad*1.01, 50%rad ;
                                           # 2=gaussian distribution with radmu & radsigma)
                                           # for 2 you must uncomment radsigma & radmu, the latter must be equal to rad
                                            # 3=discrete distribution with real values

variable    dt      equal       1e-6            # time step width [s]

variable    dCylDp  equal       ${DCYLDP}      # ratio cylinder diameter to particle diameter (optional loop)
variable    G_D_RATIO  equal    ${dCylDp}

variable    accGrev equal       9.81            # acceleration due to gravity [m/s2]

processors   ${XPROCS} ${YPROCS} ${ZPROCS}

variable    numProc equal       ${XPROCS}*${YPROCS}*${ZPROCS}*${NTHREADS}

variable    ratio   equal       0.0001

#########################################################################################
#   DUMP COMMANDS ARE DISABLED. IF YOU NEED THEM UNCOMMENT THEM. SEARCH FOR 'MARKDUMP'  #
#########################################################################################

#########################################################################################
#   IF YOU CHANGE ANYTHING BELOW THIS LINE, YOU MIGHT ADAPT THE POSTPROCESSING SCRIPT   #
#########################################################################################

#########################################################################################
#                               internal settings - do not touch                        #
#########################################################################################
units		si
#########################################################################################

# geometry scaling, mass, number of timesteps, ...
variable    rad1            equal   0.99*${rad}
variable    rad2            equal   1.01*${rad}

variable    skin            equal   0.50*${radR1}
variable    r0              equal        ${rad}

variable    desiredVolumeFraction     equal   0.62
variable    characteristicVelocity equal 0.1

# run & dump times
variable    nDump           equal   round(1e-2/${dt})
variable    nScreen         equal   round(1e-3/${dt})
variable    nDumpForce      equal   round(1e-3/${dt})

variable    totaltime	 equal   20.0
variable	nStepsSettle equal round(0.001/${dt})
variable	nStepsRun    equal round(0.01/${dt})
variable	dumpfreq     equal round(0.01/${dt})
variable	thermofreq   equal round(0.001/${dt})
variable	nstep        equal round(${totaltime}/${dt}) #2000000
variable	deletefreq   equal round(0.1/${dt}) #10000
variable    zoltanSteps	    equal   round(${nStepsRun}/20.0)

#########################################################################################

# create directories
shell   mkdir logs
shell   mkdir restart
shell   mkdir post
shell   mkdir results
shell	mkdir area
shell	mkdir images
shell	mkdir post_param


# writing log file to post folder
log     logs/log.repose_rad${rad}_dcyldp${dCylDp}_mu${fric}_rf${rf}_dt${dt}.txt

atom_style	granular
atom_modify	map array
boundary    m m fm
newton      off

communicate	single vel yes

# load simulation domain, particles, ...
read_restart	./restart/restart.repose_rad${rad}_dcyldp${dCylDp}_${OMPON}

neighbor	    ${skin} bin
neigh_modify	delay 0

#Material properties required for new pair styles
fix     m1 all property/global youngsModulus peratomtype ${ym} ${ym}
fix     m2 all property/global poissonsRatio peratomtype ${pr} ${pr}
fix     m3 all property/global coefficientRestitution peratomtypepair 2 ${rest} ${rest} ${rest} ${rest}
fix     m4 all property/global coefficientFriction peratomtypepair 2 ${fric} 0.0 0.0 0.0
fix     m5 all property/global coefficientRollingFriction peratomtypepair 2 ${rf} 0.0 0.0 0.0
fix     m6 all property/global characteristicVelocity scalar ${characteristicVelocity}

# define the material in use
fix		ptsd1  all particletemplate/sphere 5333 atom_type 1 density constant ${dens} radius constant ${radR1}
fix		ptsd2  all particletemplate/sphere 5334 atom_type 1 density constant ${dens} radius constant ${radR2}
fix		ptsd3  all particletemplate/sphere 5335 atom_type 1 density constant ${dens} radius constant ${radR3}
fix		ptsd4  all particletemplate/sphere 5336 atom_type 1 density constant ${dens} radius constant ${radR4}
fix		ptsd5  all particletemplate/sphere 5337 atom_type 1 density constant ${dens} radius constant ${radR5}
fix		ptsd6  all particletemplate/sphere 5338 atom_type 1 density constant ${dens} radius constant ${radR6}
fix		pdd  all particledistribution/discrete 5339  6 ptsd1 ${radPerc1} ptsd2 ${radPerc2} ptsd3 ${radPerc3} ptsd4 ${radPerc4} ptsd5 ${radPerc5} ptsd6 ${radPerc6}

fix		maxdiam all diam/max
variable	maxdiam equal f_maxdiam
print		"max diameter in sim: ${maxdiam}"
variable	dx_relax equal ${maxdiam}/20.
# scaling factor for mesh
variable    scale equal ${G_D_RATIO}*${maxdiam}/1.5

variable	dcyl equal ${G_D_RATIO}*${maxdiam}

# upward velocity of cylinder
variable	vup equal (1.2*${dcyl})/(${dt}*${nstep})

pair_style 	gran model hertz tangential history rolling_friction ${rolfrtyp}
pair_coeff	* *

#Timestep
timestep	${dt}

fix		gravi all gravity ${accGrev} vector 0.0 0.0 -1.0
fix		integr all nve/sphere
fix     lb all balance 0 xyz 10 1.05


# region and insertion
variable rcyl equal ${G_D_RATIO}*${maxdiam}*0.9/2.
variable hcyl equal 8./13.*${G_D_RATIO}*${maxdiam}
region	bc cylinder z 0.0 0.0 ${rcyl}  0.0 ${hcyl} units box

# meshes # use the imported meshes as granular wall
fix		cad1 all mesh/surface file meshes/ground.stl type 1 scale ${scale}
fix		cad2 all mesh/surface file meshes/cylinder.stl type 1 scale ${scale}
fix		granwalls all wall/gran model hooke mesh n_meshes 2 meshes cad1 cad2
fix		topwall all wall/gran model hooke primitive type 1 zplane 1.0

# lower region to delete particles from
region		lower block INF INF INF INF INF 0. units box

#check timestep
fix     ts all check/timestep/gran 1 0.1 0.1 #use small values to produce output

#output settings, include total thermal energy
compute		    rke all erotate/sphere
thermo_style	custom step atoms ke c_rke f_ts[1] f_ts[2] cpu vol
thermo		${thermofreq}
thermo_modify	lost ignore norm no
compute_modify	thermo_temp dynamic yes

# dump
#dump		dumpstl all stl ${dumpfreq} post_param/stldump_${rf}_*.stl
#dump		dmp all custom ${dumpfreq} post_param/dump_${rf}_*.fill id type x y z ix iy iz vx vy vz fx fy fz omegax omegay omegaz radius

### print a csv file with all the parameteres #2gauss
fix csv all print 1 "${rad}, ${dens}, ${ym}, ${pr}, ${rest}, ${fric}, ${rf}, ${dt}, ${dCylDp}, ${totaltime}, ${fileID}, &
		${rolfrtypnum}, ${nStepsSettle}, ${uniSys}, ${radDist}, ${radmu}, ${radsigma}, ${radR1}, ${radPerc1}, ${radR2}, ${radPerc2}, ${radR3}, ${radPerc3}, &
        ${radR4}, ${radPerc4}, ${radR5}, ${radPerc5}, ${radR6}, ${radPerc6}, ${numProc}, ${XPROCS}, ${YPROCS}, ${ZPROCS}, ${NTHREADS}, ${OMPON}, ${nStepsRun}" &
		file ./results/sim_parAOR_fid${fileID}.csv &
		title "rad, dens, ym, pr, rest, fric, rf, dt, dCylDp, totaltime, fileID, rolfrtypnum, nStepsSettle, uniSys, radDist, radmu, radsigma, &
        radR1, radPerc1, radR2, radPerc2, radR3, radPerc3, radR4, radPerc4, radR5, radPerc5, radR6, radPerc6, numProc, xProcs, yProcs, zProcs, nThreads, OMPON, nStepsRun"

# run 1 step to perform restart with hooke, then change interaction
run		1
unfix		granwalls
unfix		topwall
unfix csv

# pair style
pair_style 	gran model hertz tangential history rolling_friction ${rolfrtyp}
pair_coeff	* *

fix		    granwalls all wall/gran model hertz tangential history rolling_friction ${rolfrtyp} mesh n_meshes 2 meshes cad1 cad2

# get mass of particle column
variable mPartBox   equal mass(all,bc)
variable numPartBox   equal count(all,bc)
fix DumpTextMass all print ${nDumpForce} "${mPartBox}  ${numPartBox}" &
			screen no title "massPartBox numPartBox" file ./results/mass_fid${fileID}.txt


# let particles settle
run		${nStepsSettle}

# lift cylinder
fix		movecad2 all move/mesh mesh cad2 linear 0. 0. ${vup}
run		${nstep} upto every ${deletefreq} "delete_atoms region lower"

write_restart	restart/repose_loop_${fileID}.restart

variable fileID equal ${fileID}+1

# loop
clear
next     fric rf
jump     SELF loopiteration
variable fric delete

next     rf
jump     SELF loopiteration
variable rf delete

next     rest
jump     SELF loopiteration
