# Pour granular particles into chute container, then induce flow

#variables
variable partDens equal 760 # particle density

 # DEM-parameters
variable yM equal 5.e6      # Young's modulus
variable pR equal 0.45      # Poisson ratio
variable rest equal 0.5     # coefficient of restitution
variable noRest equal 0.051   # coefficient of restitution for frictionless
variable fric equal 0.1    # coefficient of friction
variable noFric equal 0     # dummy value for frictionless walls
variable roll equal 0.4           # for particles and walls with friction
variable noRoll equal 0     # for frictionless walls
variable cV equal 0.1       # chracteristic velocity

variable dt equal 0.00001

variable skin equal 0.25*0.005

# variables for the servo wall
variable topMass equal 4000 # imaginable mass of the weight (kg)
variable ctrlForce1 equal -9.81*${topMass}   # target value of the force
variable maxVel equal 0.25*${skin}/${dt}

# controller parameter (servo wall)
variable    ctrlKp          equal   1e-2
variable    ctrlKi          equal   0.0
variable    ctrlKd          equal   0.0

# Info about deleted mass
variable massPerSec equal 3.75 # deleted pass per second (kg)
variable CentermassPerSec equal 5.75 # deleted pass per second (kg) in center, also accounts for fines insertion

shell   mkdir post

atom_style		granular
atom_modify		map array
communicate	single vel yes

boundary		f f f
newton			off
units			si
processors      2 4 4

read_restart 		../DEM/liggghts.restart
reset_timestep 0

neighbor	    0.01 bin
neigh_modify	delay 0

#Material properties required for new pair styles
fix 		m1 all property/global youngsModulus peratomtype ${yM} ${yM}
fix 		m2 all property/global poissonsRatio peratomtype ${pR} ${pR}
fix 		m3 all property/global coefficientRestitution peratomtypepair 2 ${rest} ${noRest} ${noRest} ${noRest}
fix 		m4 all property/global coefficientFriction peratomtypepair 2 ${fric} ${noFric} ${noFric} ${noFric}
fix             m5 all property/global coefficientRollingFriction peratomtypepair 2 ${roll} ${noRoll} ${noRoll} ${noRoll}
fix             m6 all property/global characteristicVelocity scalar ${cV}

#pair style
pair_style gran model hooke tangential history rolling_friction cdt
pair_coeff	* *

#timestep, gravity
timestep ${dt}
fix		gravi all gravity 9.81 vector 0.0 0.0 -1.0

fix         bottom all mesh/surface file ../DEM/stl_files/bottom.stl type 1
fix         wall all mesh/surface file ../DEM/stl_files/wall.stl type 1
#fix         frictionless all mesh/surface file ../DEM/stl_files/frictionless.stl type 2
fix         inlet all mesh/surface file ../DEM/stl_files/inlet.stl type 1


# inserting servo wall on top of the particle bed
fix servoTop all mesh/surface/stress/servo file ../DEM/stl_files/top.stl type 2 scale 1.0 move 0.0 0.01 -0.01 com 0.14 0.0 2.2 ctrlPV force axis 0. 0. 1. target_val ${ctrlForce1} vel_max ${maxVel} kp ${ctrlKp} ki ${ctrlKi} kd ${ctrlKd} #verbose no

#fix             granwalls all wall/gran/hooke/history mesh n_meshes 4 meshes bottom wall frictionless servoTop
#fix granwalls all wall/gran model hooke tangential history mesh n_meshes 5 meshes bottom wall frictionless inlet servoTop


# change the particles density
# set             group all density ${partDens}

# spherical removal area close to raceway: problem with mass rate

region      delSphereCentre sphere 0.4 0.0 0.1 0.25 units box
region      delSphereLeft sphere 0.49 0.72 0.1 0.25 units box
region      delSphereRight sphere 0.49 -0.72 0.1 0.25 units box
fix         deleteCentre all remove nevery 500 massrate ${CentermassPerSec} style shrink delete_below 0.008 seed 10007143 region delSphereCentre atomtype 1
fix         deleteLeft all remove nevery 500 massrate ${massPerSec} style delete seed 10007143 region delSphereLeft atomtype 1
fix         deleteRight all remove nevery 500 massrate ${massPerSec} style delete seed 10007143 region delSphereRight atomtype 1

fix lb all balance 1000 xyz 10 1.05 out tmp.balance


#cfd coupling
fix		cfd all couple/cfd couple_every 10 mpi
fix		cfd2 all couple/cfd/force/implicit

fix		integr all nve/sphere


#screen output
variable totmass equal mass(all)
compute		1 all erotate/sphere
thermo_style	custom step atoms ke c_1 vol v_totmass
thermo		100
thermo_modify	lost ignore norm no
compute_modify	thermo_temp dynamic yes

#insert the first particles so that dump is not empty
dump 		myDump all stl 50000 ../DEM/post/dump_*.stl
dump		dmp all custom/vtk 50000 ../DEM/post/dump*.liggghts_coupled.vtk id type x y z vx vy vz fx fy fz radius
