#SVAI Schachtkuehler
#Christoph Kloss, May 2011

echo		both
variable    	rolfrtyp string	epsd2
#shell 		mkdir restart_init
#shell   	mkdir post_init

#### USER input variables
variable	runTime 	equal 20	# Total simulation time in (s)
variable	saveInterval	equal 0.05 	# Save interval
variable	saveRestart	equal 0.5
variable	dt		equal 0.00002 	# Time step
###################

### SYSTEM variables
variable	runTimeSteps	equal ${runTime}/${dt}
variable	saveIntSteps	equal ${saveInterval}/${dt}
variable	saveRestSteps	equal ${saveRestart}/${dt}
##################

shell   	mkdir restart_main
shell   	mkdir post_main
shell		mkdir postMass
variable    	volFrac equal 0.01 # 0.60

atom_style	granular
atom_modify	map array
boundary	f f f
newton		off

communicate	single vel yes

#parallelization
processors      ${XPROCS} ${YPROCS} ${ZPROCS}
#loadbalance	nlocal/simple ntry 10

units		si

region		reg block -23.6 -17.1 -5.3 2.9 4.6 12.7 units box
create_box	2 reg
#read_restart	restart_init/sinterChuteInit*.restart

neighbor	0.03 bin
neigh_modify	delay 0 #binsize 0.08
#neigh_modify 	one 3000

#Material properties required for new pair styles
#*=*=*=*=*=*=*=*=*=*=*=*=*=*=*=*=*=*=*=*=*=*=*=*=*=*=*=*=*=*=*=*=*=*=*=*=*=*=*=
#  ALL VARIABLES HERE ARE PARAMETERS
#*=*=*=*=*=*=*=*=*=*=*=*=*=*=*=*=*=*=*=*=*=*=*=*=*=*=*=*=*=*=*=*=*=*=*=*=*=*=*=

#coarse graining factor
variable 	cg equal ${DCYLDP} #5.0

#*=*=*=*=*=*=*=*=*=*=*=*=*=*=*=*=*=*=*=*=*=*=*=*=*=*=*=*=*=*=*=*=*=*=*=*=*=*=*=

#Material properties for material 1 = coal,  material 2 = dri material 3 = wall
#friction angle of 25 deg with wall
fix 		m1 all property/global youngsModulus peratomtype 300.e6 200.e6
fix 		m2 all property/global poissonsRatio peratomtype 0.4 0.4
fix 		m3 all property/global coefficientRestitution peratomtypepair 2 &
                0.2 0.2 &
                0.2 0.2 &

variable	cof1 equal 0.91
variable	cof2 equal 0.65
fix 		m4 all property/global coefficientFriction peratomtypepair 2 &
                ${cof1} ${cof2}  &
                ${cof2} ${cof2}

variable	corf1 equal 0.35
variable	corf2 equal 0.25
fix 		m5 all property/global coefficientRollingFriction peratomtypepair 2 &
                ${corf1} ${corf2}  &
                ${corf2} ${corf2}

fix 		m6 all property/global characteristicVelocity scalar 1.0
fix 		m7 all property/global k_finnie peratomtypepair 2 &
		0.1 0.1 &
		0.1 0.1

#densities
variable	SinterDens equal 2500.

#NEW sinter: radii for fractions
variable	rS0 equal ${cg}*0.005/2.
variable	rS1 equal ${cg}*0.006/2.
variable	rS2 equal ${cg}*0.010/2.
variable	rS3 equal ${cg}*0.016/2.
variable	rS4 equal ${cg}*0.025/2.
variable	rS5 equal ${cg}*0.040/2.
variable	rS6 equal ${cg}*0.050/2.


#coal diameter fractions
fix		sinter0 all particletemplate/sphere 1 atom_type 1 density constant ${SinterDens} radius constant ${rS0}
fix		sinter1 all particletemplate/sphere 1 atom_type 1 density constant ${SinterDens} radius constant ${rS1}
fix		sinter2 all particletemplate/sphere 1 atom_type 1 density constant ${SinterDens} radius constant ${rS2}
fix		sinter3 all particletemplate/sphere 1 atom_type 1 density constant ${SinterDens} radius constant ${rS3}
fix		sinter4 all particletemplate/sphere 1 atom_type 1 density constant ${SinterDens} radius constant ${rS4}
fix		sinter5 all particletemplate/sphere 1 atom_type 1 density constant ${SinterDens} radius constant ${rS5}
fix		sinter6 all particletemplate/sphere 1 atom_type 1 density constant ${SinterDens} radius constant ${rS6}

#NEW mass % for diameter fractions
variable	mS0 equal 0.185
variable	mS1 equal 0.160
variable	mS2 equal 0.212
variable	mS3 equal 0.141
variable	mS4 equal 0.106
variable	mS5 equal 0.090
variable	mS6 equal 0.106

fix 	pdd all particledistribution/discrete 524287 7 &
		sinter0 ${mS0} sinter1 ${mS1} sinter2 ${mS2} sinter3 ${mS3} &
		sinter4 ${mS4} sinter5 ${mS5} sinter6 ${mS6}


#New pair style
pair_style 	gran model hertz tangential history rolling_friction ${rolfrtyp}  #Hertzian without cohesion
pair_coeff	* *

#time-step
timestep	${dt}

fix		gravi all gravity 9.81 vector 0.0 0.0 -1.0

#meshes
fix		cad1 all mesh/surface/stress file mesh/beamsTop.stl	type 2  #heal auto_remove_duplicates
fix		cad2 all mesh/surface/stress file mesh/brickConv1.stl	type 2  heal auto_remove_duplicates
fix		cad3 all mesh/surface/stress file mesh/brickConv2.stl	type 2  heal auto_remove_duplicates
fix		cad4 all mesh/surface/stress file mesh/bricTop1.stl	type 2
fix		cad5 all mesh/surface/stress file mesh/bricTop2.stl	type 2
fix		cad6 all mesh/surface/stress file mesh/bricTop3.stl	type 2
fix		cad7 all mesh/surface/stress file mesh/convChute1.stl	type 2
fix		cad8 all mesh/surface/stress file mesh/convChute2.stl	type 2
fix		cad9 all mesh/surface/stress file mesh/brickInt1.stl	type 2
fix		cad10 all mesh/surface/stress file mesh/brickInt2.stl	type 2
fix		cad11 all mesh/surface/stress file mesh/brickInt3.stl	type 2
fix		cad12 all mesh/surface/stress file mesh/deflectorInternal.stl	type 2
fix		cad13 all mesh/surface/stress file mesh/internals_noPipe.stl	type 2
fix		cad14 all mesh/surface/stress file mesh/pipeCut.stl	type 2
fix		cad15 all mesh/surface/stress file mesh/separators.stl	type 2
fix		cad16 all mesh/surface/stress file mesh/separatorsWalls.stl	type 2
fix		cad17 all mesh/surface/stress file mesh/sidesChute.stl	type 2
fix		cad18 all mesh/surface/stress file mesh/sideSmallChute.stl	type 2
fix		cad19 all mesh/surface/stress file mesh/topChute.stl	type 2

fix		inface1 all mesh/surface/planar file mesh/inlet1.stl          type     2
fix		inface2 all mesh/surface/planar file mesh/inlet2.stl          type     2

fix		massFace all mesh/surface/planar file mesh/massFlowFace.stl	type     2 # Face to output mass

#region		outsideinsmesh mesh/tet  file mesh/mesh_fill.vtk          scale 0.001 move 0.0 0.0 0.0 rotate 0.0 0.0 0.0 units box side out

#wall/gran model hertz tangential history rolling_friction ${rolfrtyp} mesh n_meshes 1 meshes
#fix		meshwalls all wall/gran/hooke 3 0 mesh/gran 1 cad
fix		meshwalls all wall/gran model hertz tangential history rolling_friction ${rolfrtyp} mesh n_meshes 19 meshes cad1 cad2 &
cad3 cad4 cad5 cad6 cad7 cad8 cad9 cad10 cad11 cad12 cad13 cad14 cad15 cad16 cad17 cad18 cad19


#fix		xwalls all wall/gran/hooke 3 0 xplane -1.1 1.1  2
#fix		ywalls all wall/gran/hooke 3 0 yplane -1.0 6.0  2
#fix		zwalls all wall/gran/hooke 3 0 zplane -4.8 NULL 2
#fix		xwalls1 all wall/gran model hertz tangential history rolling_friction ${rolfrtyp} primitive type 2 xplane -1.1
#fix		xwalls2 all wall/gran model hertz tangential history rolling_friction ${rolfrtyp} primitive type 2 xplane  1.1
#fix		ywalls1 all wall/gran model hertz tangential history rolling_friction ${rolfrtyp} primitive type 2 yplane -1.0
#fix		ywalls2 all wall/gran model hertz tangential history rolling_friction ${rolfrtyp} primitive type 2 yplane  6.0
#fix		zwalls1 all wall/gran model hertz tangential history rolling_friction ${rolfrtyp} primitive type 2 zplane -4.8

#insertion
#*=*=*=*=*=*=*=*=*=*=*=*=*=*=*=*=*=*=*=*=*=*=*=*=*=*=*=*=*=*=*=*=*=*=*=*=*=*=*=
#values that are entered numerically here refer to original scale
#values in kg/s
#*=*=*=*=*=*=*=*=*=*=*=*=*=*=*=*=*=*=*=*=*=*=*=*=*=*=*=*=*=*=*=*=*=*=*=*=*=*=*=

#time speed-up ratio
variable	speedup_ratio equal 1.

#total charging rate - should be equal to total removal rate in kg/s
#350 tons/h
variable 	chargingrate equal 97.22*${speedup_ratio}
print 		"The total simulation charging/removal rate is now ${chargingrate}"

#*=*=*=*=*=*=*=*=*=*=*=*=*=*=*=*=*=*=*=*=*=*=*=*=*=*=*=*=*=*=*=*=*=*=*=*=*=*=*=
#central insertion of material
#*=*=*=*=*=*=*=*=*=*=*=*=*=*=*=*=*=*=*=*=*=*=*=*=*=*=*=*=*=*=*=*=*=*=*=*=*=*=*=

variable	vz0 equal -6.0 #estimated

fix		ins1 all insert/stream seed 5330 distributiontemplate pdd &
		mass 1000000 massrate ${chargingrate} overlapcheck yes all_in yes &
		vel constant -1.0 0.0 ${vz0} extrude_length 0.8 insertion_face inface1

fix		ins2 all insert/stream seed 5330 distributiontemplate pdd &
		mass 1000000 massrate ${chargingrate} overlapcheck yes all_in yes &
		vel constant 1.0 0.0 ${vz0} extrude_length 0.8 insertion_face inface2


#*=*=*=*=*=*=*=*=*=*=*=*=*=*=*=*=*=*=*=*=*=*=*=*=*=*=*=*=*=*=*=*=*=*=*=*=*=*=*=

#apply nve integration
fix		integr all nve/sphere

#Calculate mass flow
fix 		mass all massflow/mesh mesh massFace count once vec_side 0. 0. -1.0 # Fix to calculate mass flow

#output settings, include total thermal energy
compute		1 all erotate/sphere
fix		2 all check/timestep/gran ${saveIntSteps} 0.15 0.15
thermo_style	custom step atoms ke c_1 f_2[1] f_2[2] cpu vol
thermo		${saveIntSteps}
thermo_modify	lost ignore norm no
compute_modify	thermo_temp dynamic yes

#write restart files
restart		${saveRestSteps} restart_main/sinterChuteRun*.restart

run		1
dump		dmp all custom ${saveIntSteps} post_main/dump*.sinterChute id type x y z vx vy vz fx fy fz omegax omegay omegaz radius
#dump		dmp2 all custom ${saveIntSteps} post_main/dump*.evalout id type x y z vx vy vz radius # I think you could comment this dump?! I don't think you need it.
dump 		dumpstress all mesh/gran/VTK ${saveIntSteps} post_main/dump*.vtk stress cad1 cad2 &
cad3 cad4 cad5 cad6 cad7 cad8 cad9 cad10 cad11 cad12 cad13 cad14 cad15 cad16 cad17 cad18 cad19

####### Output Mass #########
variable outMass	equal f_mass[1]
variable outParticle	equal f_mass[2]
variable outMassRate	equal f_mass[3]
variable outPartRate	equal f_mass[4]
variable outDelMass	equal f_mass[5]
variable outDelPart	equal f_mass[6]
variable simulatedTime	equal ${dt}*step

variable dumpMassRate equal 0.01/${dt} # Set mass flow output interval!

fix 	 dumpMass all print ${dumpMassRate} "${simulatedTime} ${outMass} ${outParticle} ${outMassRate} ${outPartRate} ${outDelMass} ${outDelPart}" &
screen no title "Time Mass Particle MassRate PartRate delMass delPart" file postMass/massFlow.txt
#############################

#region		dmp2reg block -0.55 0.55  0.6 5.5  -3.6 -3.4 units box
#dump_modify	dmp2 region dmp2reg
#dump 		dumpstress all mesh_run/gran/VTK 2000 post/dump*.vtk stress wear cad

#run a few steps just with insertion, no removal to fill the chute
run		${runTimeSteps}

#removal
#*=*=*=*=*=*=*=*=*=*=*=*=*=*=*=*=*=*=*=*=*=*=*=*=*=*=*=*=*=*=*=*=*=*=*=*=*=*=*=
#particle removal by deletion
#*=*=*=*=*=*=*=*=*=*=*=*=*=*=*=*=*=*=*=*=*=*=*=*=*=*=*=*=*=*=*=*=*=*=*=*=*=*=*=
#region		delreg mesh/tet  file mesh/mesh_fill.vtk          scale 0.001 move 0.0 0.0 0.0 rotate 0.0 0.0 0.0 units box
#fix		delsinter all corex/materialremove nevery 200 rate ${chargingrate} style delete seed 10007143 region delreg atomtype 1
#fix		delsinter all evaporate 200 3382 delreg 10007143
#delete_atoms porosity delreg 0.02 482793

#run while inserting and removing particles
#run			200000 every 200 "delete_atoms porosity delreg 0.1 482793" #upto #10000000 upto
